// SBML level 3 version 2

model whole_ecosystem_20circuits()
  // Whole Ecosystem Model - 20 Circuits

  // Compartments:
  compartment cell = 1;

  // Species:
  species Ecoli_K in cell = 1/cell;
  species Ecoli_L in cell = 1/cell;
  species Ecoli_Trp in cell = 1/cell;
  species Ecoli_His in cell = 1/cell;
  species Lys in cell = 0;
  species Leu in cell = 0;
  species Trp in cell = 0;
  species His in cell = 0;
  species Gsulf in cell = 1/cell;
  species Gmet in cell = 1/cell;
  species Acs in cell = 0;
  species OmcZ_A in cell = 0;
  species OmcZ_B in cell = 0;
  species Current in cell = 0;
  species MazE_A in cell = 5/cell;
  species MazF_A in cell = 0;
  species MazE_B in cell = 5/cell;
  species MazF_B in cell = 0;
  species KillSignal in cell = 0;
  species AHL in cell = 0;
  species LuxR_AHL in cell = 0;
  species AI2 in cell = 0;
  species NH4 in cell = 10/cell;
  species NO2 in cell = 0;
  species NO3 in cell = 0;
  species NO in cell = 0;
  species N2O in cell = 0;
  species N2 in cell = 0;
  species AcetylCoA in cell = 5/cell;
  species MalonylCoA in cell = 0;
  species Naringenin in cell = 0;
  species Isoprenoid in cell = 0;
  species BetaCarotene in cell = 0;

  // Parameters:
  k_K_lys = 0.15;
  k_L_leu = 0.15;
  k_Trp_trp = 0.15;
  k_His_his = 0.15;
  k_K_grow = 0.04;
  k_L_grow = 0.04;
  k_Trp_grow = 0.04;
  k_His_grow = 0.04;
  k_K_death = 0.05;
  k_L_death = 0.05;
  k_Trp_death = 0.05;
  k_His_death = 0.05;
  k_Gsulf_grow = 0.03;
  k_Gmet_grow = 0.03;
  k_Gsulf_death = 0.1;
  k_Gmet_death = 0.1;
  k_acs = 0.1;
  k_omcZ_B_basal = 0.05;
  k_omcZ_boost_A = 0.2;
  k_omcZ_boost_B = 0.2;
  k_current = 0.02;
  k_NO_induces_omcZ = 0.08;
  k_mazE_A = 0.1;
  k_mazE_B = 0.1;
  k_mazF_A = 0.15;
  k_mazF_B = 0.15;
  k_antitox = 0.5;
  k_tox_kill = 0.25;
  k_mazE_deg = 0.05;
  k_luxI = 0.05;
  k_luxS = 0.05;
  k_luxR_act = 0.1;
  k_killsig = 0.05;
  k_AHL_deg = 0.02;
  k_AI2_deg = 0.02;
  k_killsig_deg = 0.05;
  k_nitrosomonas = 0.15;
  k_nitrobacter = 0.12;
  k_pseud_narG = 0.1;
  k_pseud_nirS = 0.1;
  k_parac_norB = 0.1;
  k_parac_nosZ = 0.1;
  k_malCoA = 0.08;
  k_naringenin = 0.06;
  k_isoprenoid = 0.08;
  k_betacarot = 0.06;

  // Reactions:
  r_K_lys: Ecoli_K => Ecoli_K + Lys; k_K_lys*Ecoli_K;
  r_L_leu: Ecoli_L => Ecoli_L + Leu; k_L_leu*Ecoli_L;
  r_Trp_prod: Ecoli_Trp => Ecoli_Trp + Trp; k_Trp_trp*Ecoli_Trp;
  r_His_prod: Ecoli_His => Ecoli_His + His; k_His_his*Ecoli_His;
  r_K_grow: Ecoli_K + Leu => 2 Ecoli_K; k_K_grow*Ecoli_K*Leu;
  r_L_grow: Ecoli_L + Lys => 2 Ecoli_L; k_L_grow*Ecoli_L*Lys;
  r_Trp_grow: Ecoli_Trp + His => 2 Ecoli_Trp; k_Trp_grow*Ecoli_Trp*His;
  r_His_grow: Ecoli_His + Trp => 2 Ecoli_His; k_His_grow*Ecoli_His*Trp;
  r_K_death: Ecoli_K => ; k_K_death*Ecoli_K;
  r_L_death: Ecoli_L => ; k_L_death*Ecoli_L;
  r_Trp_death: Ecoli_Trp => ; k_Trp_death*Ecoli_Trp;
  r_His_death: Ecoli_His => ; k_His_death*Ecoli_His;
  r_Gsulf_grow: => Gsulf; k_Gsulf_grow*Gsulf;
  r_Gmet_grow: => Gmet; k_Gmet_grow*Gmet;
  r_Gsulf_death: Gsulf => ; k_Gsulf_death*Gsulf;
  r_Gmet_death: Gmet => ; k_Gmet_death*Gmet;
  r_acs_prod: Gsulf => Gsulf + Acs; k_acs*Gsulf;
  r_omcZ_B_basal: Gmet => Gmet + OmcZ_B; k_omcZ_B_basal*Gmet;
  r_omcZ_B_induced: Gmet + NO => Gmet + OmcZ_B; k_NO_induces_omcZ*Gmet*NO;
  r_omcZ_boost_A: Gsulf => Gsulf + OmcZ_A; k_omcZ_boost_A*Gsulf;
  r_omcZ_boost_B: Gmet => Gmet + OmcZ_B; k_omcZ_boost_B*Gmet;
  r_current: Gsulf + Gmet => Gsulf + Gmet + Current; k_current*Gsulf*Gmet*(1 + OmcZ_A)*(1 + OmcZ_B);  // modifiers: OmcZ_A, OmcZ_B
  r_mazE_A: => MazE_A; k_mazE_A*Gsulf;  // modifiers: Gsulf
  r_mazF_A: KillSignal => KillSignal + MazF_A; k_mazF_A*KillSignal*Gsulf;  // modifiers: Gsulf
  r_antitox_A: MazE_A + MazF_A => ; k_antitox*MazE_A*MazF_A;
  r_kill_A: Gsulf => ; k_tox_kill*MazF_A*Gsulf;  // modifiers: MazF_A
  r_mazE_A_deg: MazE_A => ; k_mazE_deg*MazE_A;
  r_mazE_B: => MazE_B; k_mazE_B*Gmet;  // modifiers: Gmet
  r_mazF_B: KillSignal => KillSignal + MazF_B; k_mazF_B*KillSignal*Gmet;  // modifiers: Gmet
  r_antitox_B: MazE_B + MazF_B => ; k_antitox*MazE_B*MazF_B;
  r_kill_B: Gmet => ; k_tox_kill*MazF_B*Gmet;  // modifiers: MazF_B
  r_mazE_B_deg: MazE_B => ; k_mazE_deg*MazE_B;
  r_AHL_prod: => AHL; k_luxI*Gsulf;  // modifiers: Gsulf
  r_LuxR_bind: AHL => LuxR_AHL; k_luxR_act*AHL;
  r_killsig_prod: LuxR_AHL => LuxR_AHL + KillSignal; k_killsig*LuxR_AHL;
  r_AHL_deg: AHL => ; k_AHL_deg*AHL;
  r_killsig_deg: KillSignal => ; k_killsig_deg*KillSignal;
  r_AI2_prod: => AI2; k_luxS*Gmet;  // modifiers: Gmet
  r_AI2_deg: AI2 => ; k_AI2_deg*AI2;
  r_nitrosomonas: NH4 => NO2; k_nitrosomonas*NH4;
  r_nitrobacter: NO2 => NO3; k_nitrobacter*NO2;
  r_pseud_narG: NO3 => NO2; k_pseud_narG*NO3;
  r_pseud_nirS: NO2 => NO; k_pseud_nirS*NO2;
  r_parac_norB: NO => N2O; k_parac_norB*NO;
  r_parac_nosZ: N2O => N2; k_parac_nosZ*N2O;
  r_malCoA: AcetylCoA => MalonylCoA; k_malCoA*AcetylCoA;
  r_naringenin: MalonylCoA => Naringenin; k_naringenin*MalonylCoA;
  r_isoprenoid: AcetylCoA => Isoprenoid; k_isoprenoid*AcetylCoA;
  r_betacarot: Isoprenoid => BetaCarotene; k_betacarot*Isoprenoid;
end
