// SBML level 3 version 1

model whole_ecosystem()
  // Whole Ecosystem Reduced Model

  // Compartments:
  compartment cell = 1;

  // Species:
  species GA in cell = 1/cell;
  species GB in cell = 1/cell;
  species Trp in cell = 0;
  species Leu in cell = 0;
  species Current in cell = 0;
  species NH4 in cell = 10/cell;
  species NO2 in cell = 0;
  species NO3 in cell = 0;
  species N2 in cell = 0;

  // Parameters:
  k_trp_prod = 0.15;
  k_leu_prod = 0.15;
  k_GA_growth = 0.04;
  k_GB_growth = 0.04;
  k_GA_death = 0.15;
  k_GB_death = 0.15;
  k_current = 0.02;
  boostA = 1.5;
  boostB = 1.3;
  k_nh4_no2 = 0.15;
  k_no2_no3 = 0.12;
  k_no3_n2 = 0.08;

  // Reactions:
  r_trp_prod: GA => GA + Trp; k_trp_prod*GA;
  r_leu_prod: GB => GB + Leu; k_leu_prod*GB;
  r_GA_growth: GA + Leu => 2 GA; k_GA_growth*GA*Leu;
  r_GB_growth: GB + Trp => 2 GB; k_GB_growth*GB*Trp;
  r_GA_death: GA => Current; k_GA_death*GA;
  r_GB_death: GB => Current; k_GB_death*GB;
  r_current: GA + GB => GA + GB + Current; k_current*boostA*boostB*GA*GB;
  r_nh4_to_no2: NH4 => NO2; k_nh4_no2*NH4;
  r_no2_to_no3: NO2 => NO3; k_no2_no3*NO2;
  r_no3_to_n2: NO3 => N2; k_no3_n2*NO3;
end
